*HEADING
Modelo de Casca Gerado Automaticamente
Sistema de Unidades: SI (m, kg, s)
*NODE, NSET=ALLNODES
1, 0.200000, 0.000000, 0.346410, 0.500000, 0.000000, 0.866025, 0.000000, 5.000000, 0.000000, -0.866025, 0.000000, 0.500000
2, 0.202000, 0.000000, 0.349874, 0.500000, 0.000000, 0.866025, 0.000000, 4.950495, 0.000000, -0.866025, 0.000000, 0.500000
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*NSET, NSET=X0, GENERATE
1 , 20100, 101
*NSET, NSET=X1, GENERATE
101 , 20200, 101
*NSET, NSET=Y0, GENERATE
1 , 101, 1
*NSET, NSET=Y1, GENERATE
20100 , 20200, 1
*ELEMENT, TYPE=S4R, ELSET=ALLELEMENTS
1, 1, 2, 103, 102
2, 2, 3, 104, 103
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*MATERIAL, NAME=MATERIAL_ELASTICO
*ELASTIC
70000000000.0, 0.3
*DENSITY
2710
*NODAL THICKNESS
1, 0.005600000000000001
2, 0.005616
3, 0.005632000000000001
4, 0.005648000000000001
5, 0.005664000000000001
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20200, 0.0072000000000000015
*SHELL SECTION, ELSET=ALLELEMENTS, MATERIAL=MATERIAL_ELASTICO, NODAL THICKNESS
1, 3
*BOUNDARY, TYPE=DISPLACEMENT
X0, 1, 1
*BOUNDARY, TYPE=DISPLACEMENT
X1, 1, 1
*BOUNDARY, TYPE=DISPLACEMENT
X0, 2, 2
*BOUNDARY, TYPE=DISPLACEMENT
X1, 2, 2
*BOUNDARY, TYPE=DISPLACEMENT
X0, 3, 3
*BOUNDARY, TYPE=DISPLACEMENT
X0, 4, 6
*BOUNDARY, TYPE=DISPLACEMENT
X1, 3, 3
*BOUNDARY, TYPE=DISPLACEMENT
X1, 4, 6
*STEP
*FREQUENCY
40, 100, 100000
*END STEP
