*HEADING
Modelo de Casca Gerado Automaticamente
Sistema de Unidades: SI (m, kg, s)
*NODE, NSET=ALLNODES
1, 0.000000, 0.000000, 0.121674
2, 0.003048, 0.000000, 0.121674
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*ELEMENT, TYPE=S4, ELSET=ALLELEMENTS
1, 1, 2, 53, 52
2, 2, 3, 54, 53
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*MATERIAL, NAME=STEEL
*ELASTIC
206000000000.0, 0.3
*DENSITY
7800
*SHELL SECTION, ELSET=ALLELEMENTS, MATERIAL=STEEL, THICKNESS=0.001
*STEP
*STATIC
*END STEP
